*HEADING
TITLE = Bellow with cap
**
** ---------------------------------------------------
** ---- *NODE ----------------------------------------
** ---------------------------------------------------
**
** following nodes were defined in the global coordinate system
**
*SYSTEM
**
*NODE, SYSTEM=R
       1,          1.,         1.5,          0.
       2,    1.041667,    1.458333,          0.
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**
** ---------------------------------------------------
** ---- *MATERIAL ------------------------------------
** ---------------------------------------------------
**
** material data from MAT1 with MID = 1
**
*MATERIAL, NAME=MAT_MID_1
*ELASTIC
1.07e+07, 0.33
*DENSITY
0.00025906,
*EXPANSION, ZERO=70.
1.255e-05,
**
** material data from MAT1 with MID = 2
**
*MATERIAL, NAME=MAT_MID_2
*ELASTIC
2.9e+07, 0.32
*DENSITY
0.00073315,
*EXPANSION, ZERO=70.
6.6e-06,
**
*SECTION CONTROLS, NAME=REDUCED_INTEGRATION_FROMNASTRAN
**
** ---------------------------------------------------------------------
** --- SHELL elements (isotropic, non-directional, grouped by PSHELL ID)
** ---------------------------------------------------------------------
**
** this SHELL SECTION comes from PSHELL entries with PID = 1
**
*SHELL SECTION, ELSET=PSHELL_1, MATERIAL=MAT_MID_1
0.0254,
**
*ELEMENT, TYPE=S4, ELSET=PSHELL_1
1, 1, 2, 39, 38
2, 2, 3, 40, 39
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**
** this SHELL SECTION comes from PSHELL entries with PID = 2
**
*SHELL SECTION, ELSET=PSHELL_2, MATERIAL=MAT_MID_2
1.5,
**
*ELEMENT, TYPE=S3, ELSET=PSHELL_2
1297, 1370, 1371, 1378
1303, 1370, 1378, 1385
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**
*ELEMENT, TYPE=S4, ELSET=PSHELL_2
1298, 1371, 1372, 1379, 1378
1299, 1372, 1373, 1380, 1379
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**
** elset ALL_SHELL_ISO contains 1512 elements in 2 elsets
*ELSET, ELSET=ALL_SHELL_ISO
PSHELL_1,
PSHELL_2,
**
** elset ALL_MASSIVE_ELEMENTS contains all 1512 elements that can have mass
*ELSET, ELSET=ALL_MASSIVE_ELEMENTS
ALL_SHELL_ISO,
** ---------------------------------------------------
*STEP
*STATIC
**
** output request from "DISPLACEMENT(SORT1[default],PLOT)=ALL"
*OUTPUT, FIELD
*NODE OUTPUT
U,
**
** ------------------------------------
** ------ LOADCASE data for SUBCASE 0
** ------------------------------------
*BOUNDARY, OP=NEW
** from SPC set 1
      37, 1,3, 0.
      74, 1,3, 0.
     111, 1,3, 0.
     148, 1,3, 0.
     185, 1,3, 0.
     222, 1,3, 0.
     259, 1,3, 0.
     296, 1,3, 0.
     333, 1,3, 0.
     370, 1,3, 0.
     407, 1,3, 0.
     444, 1,3, 0.
     481, 1,3, 0.
     518, 1,3, 0.
     555, 1,3, 0.
     592, 1,3, 0.
     629, 1,3, 0.
     666, 1,3, 0.
     703, 1,3, 0.
     740, 1,3, 0.
     777, 1,3, 0.
     814, 1,3, 0.
     851, 1,3, 0.
     888, 1,3, 0.
     925, 1,3, 0.
     962, 1,3, 0.
     999, 1,3, 0.
    1036, 1,3, 0.
    1073, 1,3, 0.
    1110, 1,3, 0.
    1147, 1,3, 0.
    1184, 1,3, 0.
    1221, 1,3, 0.
    1258, 1,3, 0.
    1295, 1,3, 0.
    1332, 1,3, 0.
*CLOAD, OP=NEW
    1370, 2, -2.e+04
*END STEP
